# ============================================================
# Pb implantation in diamond -- warmup + cascade + quench
#
#   Phase 1: warmup    -- Langevin equilibration (T>0) or energy
#                         minimisation (T=0); ion held fixed
#   Phase 2: collision -- ion strike at tilt theta / random azimuth,
#                         adaptive dt, boundary-only thermostat,
#                         electronic stopping, auto-halt when the
#                         ballistic phase is over (max KE < 100 eV)
#   Phase 3: quench    -- 500 ps at target T, boundary-only thermostat,
#                         safety dt/reset
#
# Tilt design: the LATTICE is fixed with the chosen channel axis along z
# (the surface normal); the tilt angle is applied to the ION VELOCITY,
# with the azimuth randomised per ensemble.  This matches the experiment
# (fixed wafer, steered beam) and averages over planar-channel azimuths
# instead of locking the tilt into one crystal plane.
#
# Crystal orientation is a sweep axis: ORIENTATION = 100 / 110 / 111 picks
# the surface normal / channel axis, with per-orientation box dimensions
# tuned to near-constant PHYSICAL geometry (see the lattice section).
#
# Placeholders ENERGY_KEV / ANGLE_DEG / TEMPERATURE / ORIENTATION are
# replaced by deploy-experiment.sh via sed.  `ensemble` and `rseed` arrive
# on the command line from the SLURM array task (-var ensemble N -var rseed S).
# ============================================================

# ---------- Initialisation ----------
units       metal
dimension   3
boundary    p p f               # periodic laterally; open in z -- sputtered
                                # ejecta and transmitted ions leave cleanly
                                # (thermo_modify lost warn logs them)
atom_style  atomic

# ---------- Sweep parameters (sed by deploy-experiment.sh) ----------
variable    energy_keV  equal ENERGY_KEV
variable    angle_deg   equal ANGLE_DEG
variable    temperature equal TEMPERATURE
variable    orientation equal ORIENTATION

# ---------- Runtime parameters (command line -var; safe defaults) ----------
variable    ensemble        index 0
variable    rseed           index 12345
variable    warmup_steps    index 25000     # 25 ps @ 1 fs
variable    collision_steps index 500000    # ceiling only -- fix halt exits
                                            # as soon as max KE < 100 eV
variable    anneal_steps    index 50000     # 50 ps @ 1 fs.  The cascade
                                            # thermal spike dies in 1-5 ps and
                                            # dissipates in 10-30 ps; past that
                                            # diamond's 1.7-2.3 eV defect
                                            # barriers give ~1e-16/s hop rates
                                            # at 300 K, so the count is frozen.
                                            # The ion moves <1 nm after the
                                            # collision halt, so depth is
                                            # unaffected.

# ---------- Species constants (Pb) ----------
variable    species     string pb
variable    mass_ion    equal 207.2
variable    z_ion       equal 82

# ---------- Paths (cluster) ----------
variable    pot_root    string /home/stovey/work/projects/quantum-lab/ballistic-diamond
variable    tersoff_pot string ${pot_root}/classical-simulations/potentials/C.tersoff.zbl
variable    stop_file   string ${pot_root}/classical-simulations/potentials/electron-stopping-${species}.dat
variable    scratch     string /work/stovey/ballistic-diamond/tersoff-sweep-pb/orient-${orientation}/energy-${energy_keV}/temperature-${temperature}/angle-${angle_deg}-${ensemble}

# ---------- Independent seeds ----------
# LAMMPS RanMars (equal-style random(), fix langevin) aborts on seeds
# >= 900,000,000 -- clamp whatever arrives via -var rseed, then offset.
variable    rseed_c      equal (v_rseed%899999990)+1
variable    seed_diamond equal v_rseed_c+1
variable    seed_posx    equal v_rseed_c+2
variable    seed_posy    equal v_rseed_c+3
variable    seed_eq      equal v_rseed_c+4
variable    seed_coll    equal v_rseed_c+5
variable    seed_anneal  equal v_rseed_c+6
variable    seed_azi     equal v_rseed_c+7

# ---------- Lattice constant ----------
# MUST match the potential's own equilibrium (Tersoff-1989 C), not the
# experimental 3.567: a mismatched box pre-strains the crystal (the
# Gao-Weber file at 3.567 put slabs under ~GPa lateral stress and
# 1.6-3.6% bond compression before any ion arrived).
variable    alat        equal 3.5678

# ---------- Strike kinematics ----------
# v[A/ps] = 138.91*sqrt(E[eV]/M[amu]) in metal units.
# theta = polar tilt off the surface normal / channel axis.
# phi   = azimuth, drawn uniformly per ensemble (frozen at read time --
#         equal-style random() would otherwise re-roll on every reference).
variable    speed       equal 138.91*sqrt(${energy_keV}*1000/${mass_ion})
variable    theta       equal ${angle_deg}*PI/180
variable    razi        equal random(0,360,${seed_azi})
variable    azimuth_deg equal ${razi}
variable    phi         equal ${azimuth_deg}*PI/180
variable    vionx       equal ${speed}*sin(${theta})*cos(${phi})
variable    viony       equal ${speed}*sin(${theta})*sin(${phi})
variable    vionz       equal -${speed}*cos(${theta})

# ---------- Lattice & geometry: beam axis z = channel axis ----------
# LAMMPS lattice spacings are the bounding-box extents of the rotated
# conventional cell, so they differ per orientation.  Lattice-unit dims are
# chosen per orientation for near-constant PHYSICAL geometry: ~70-100 A
# lateral, ~3320 A of material (contains the channeled tail; the corrected
# electronic stopping lets well-channeled 35-60 keV ions run 1000-3000 A),
# slab_lo fixed at 10 units, 30 units of vacuum above, ion 20 above surface.
#   orient  z-spacing  ylat_hi  slab_hi  material  atoms
#   100     3.567 A    20       940      3317 A    ~3.0M
#   110     5.044 A    20       670      3329 A    ~4.2M
#   111     6.178 A    12       550      3336 A    ~4.1M
if "${orientation} == 100" then &
    "lattice diamond ${alat} orient x 1 0 0 orient y 0 1 0 orient z 0 0 1" &
    "variable ylat_hi equal 20" &
    "variable slab_hi equal 940" &
    "variable xspac equal ${alat}" &
    "variable yspac equal ${alat}" &
    "variable zspac equal ${alat}"
if "${orientation} == 110" then &
    "lattice diamond ${alat} orient x 1 1 0 orient y 0 0 -1 orient z -1 1 0" &
    "variable ylat_hi equal 20" &
    "variable slab_hi equal 670" &
    "variable xspac equal ${alat}*sqrt(2.0)" &
    "variable yspac equal ${alat}" &
    "variable zspac equal ${alat}*sqrt(2.0)"
if "${orientation} == 111" then &
    "lattice diamond ${alat} orient x 1 -1 0 orient y 1 1 -2 orient z 1 1 1" &
    "variable ylat_hi equal 12" &
    "variable slab_hi equal 550" &
    "variable xspac equal ${alat}*sqrt(2.0)" &
    "variable yspac equal 4.0*${alat}/sqrt(6.0)" &
    "variable zspac equal ${alat}*sqrt(3.0)"

variable    boxz_hi  equal ${slab_hi}+30
variable    ionz_lat equal ${slab_hi}+20
variable    ybath_lo equal ${ylat_hi}-1

region      box  block 0 20 0 ${ylat_hi} 0 ${boxz_hi} units lattice
create_box  2 box
region      slab block 0 20 0 ${ylat_hi} 10 ${slab_hi} units lattice
create_atoms 1 region slab

mass        1 12.011
mass        2 ${mass_ion}

# ---------- Place projectile ----------
# Entry point, in lattice units, z = slab_hi+20 units above the surface.
#   x0_lat/y0_lat < 0 (default) -> RANDOM over a 4x4-lattice-unit patch:
#       samples channel geometry statistically, gives depth histograms.
#   x0_lat/y0_lat >= 0          -> EXPLICIT placement from the deploy loop:
#       a grid over the projected channel cell, which yields a channel MAP
#       and (being area-stratified) an unbiased depth histogram as well.
variable    x0_lat   index -1
variable    y0_lat   index -1
variable    posy_lo  equal ${ylat_hi}/2-2
variable    posy_hi  equal ${ylat_hi}/2+2
# With an explicit entry point, x0_lat/y0_lat are where the ion should CROSS
# THE SURFACE.  It is launched 20 lattice units above that, so at tilt theta
# it drifts sideways by gap*tan(theta) along the azimuth on the way down --
# ~17 A at 10 deg, i.e. several channel cells.  Back the launch point off by
# that drift so the ion arrives where intended.
variable    gap_lat  equal 20
variable    drift_A  equal ${gap_lat}*${zspac}*tan(${theta})
if "${x0_lat} < 0" then &
    "variable entry_x equal random(8,12,${seed_posx})" &
    "variable entry_y equal random(${posy_lo},${posy_hi},${seed_posy})" &
else &
    "variable entry_x equal ${x0_lat}-${drift_A}*cos(${phi})/${xspac}" &
    "variable entry_y equal ${y0_lat}-${drift_A}*sin(${phi})/${yspac}"
create_atoms 2 single ${entry_x} ${entry_y} ${ionz_lat} units lattice

# ---------- Potentials ----------
# tersoff/zbl : Tersoff C-C smoothly joined to ZBL at short range, so keV
#               carbon recoils see the universal repulsive core instead of
#               Tersoff's undefined-at-short-range well.
# zbl 3.5 4.5 : screened Coulomb for ion-C / ion-ion.  The outer cutoff
#               matters for channeling: V_ZBL(Pb-C) is still ~13 eV at 1.5 A
#               and 0.26 eV at 3 A -- the continuum steering potential lives
#               at 1.3-3 A.  At 4.5 A the truncation is 12 meV (clean).
pair_style  hybrid tersoff/zbl zbl 3.5 4.5
pair_coeff  * * tersoff/zbl ${tersoff_pot} C NULL
pair_coeff  1 2 zbl 6.0 ${z_ion}
pair_coeff  2 2 zbl ${z_ion} ${z_ion}

# ---------- Groups ----------
group       diamond type 1
group       ion     type 2

# Boundary heat bath: ~1-lattice-unit skin on the four lateral faces plus a
# layer just above the anchor.  Langevin acts only there; the interior runs
# NVE so cascade energetics are undamped.  Restricted to carbons so a
# deep-channeling ion is never Langevin-damped.
region      bath_xlo block INF 1 INF INF INF INF units lattice
region      bath_xhi block 19 20 INF INF INF INF units lattice
region      bath_ylo block INF INF INF 1 INF INF units lattice
region      bath_yhi block INF INF ${ybath_lo} ${ylat_hi} INF INF units lattice
region      bath_zlo block INF INF INF INF 11 13 units lattice
group       bath_geom region bath_xlo
group       bath_geom region bath_xhi
group       bath_geom region bath_ylo
group       bath_geom region bath_yhi
group       bath_geom region bath_zlo
group       bath intersect diamond bath_geom

# Pin the bottom material layer against recoil pressure (during strike+quench).
region      anchor block INF INF INF INF 10 11 units lattice
group       anchor region anchor

# ---------- Output directory + provenance ----------
shell       mkdir -p ${scratch}
print """{
  "species": "${species}",
  "orientation": ${orientation},
  "energy_keV": ${energy_keV},
  "angle_deg": ${angle_deg},
  "azimuth_deg": ${azimuth_deg},
  "temperature_K": ${temperature},
  "ensemble": ${ensemble},
  "rseed": ${rseed},
  "a_lattice": ${alat},
  "entry_x_lat": ${entry_x},
  "entry_y_lat": ${entry_y},
  "speed_A_ps": ${speed}
}""" file ${scratch}/params.json screen no

# ---------- Thermo ----------
thermo      1000
thermo_style custom step time dt temp ke pe etotal press
# Sputtered ejecta exiting the open z faces are expected -- log, don't abort.
# The analysis flags the (rare) case where the ION itself is the lost atom.
thermo_modify lost warn flush yes

# ============================================================
# Phase 1: Warmup -- ion frozen
#   T > 0 : Langevin MD at target temperature
#   T = 0 : energy minimisation (Langevin at 0 K integrates nothing and the
#           cleaved surface still needs to relax)
# ============================================================
fix         freezeion ion setforce 0.0 0.0 0.0
timestep    0.001

if "${temperature} > 0" then &
    "velocity diamond create ${temperature} ${seed_diamond} rot yes dist gaussian" &
    "fix eqbath diamond langevin ${temperature} ${temperature} 0.1 ${seed_eq} zero yes" &
    "fix eqdyn diamond nve" &
    "run ${warmup_steps}" &
    "unfix eqdyn" &
    "unfix eqbath" &
else &
    "minimize 1.0e-6 1.0e-8 2000 20000"

unfix       freezeion

# ============================================================
# Phase 2: Collision -- tilted strike, adaptive dt, e-stopping
# ============================================================
velocity    ion set ${vionx} ${viony} ${vionz} units box

fix         pin     anchor setforce 0.0 0.0 0.0
# setforce zeroes FORCES only -- at T>0 anchor atoms keep their thermal
# velocities and, with zero force, drift ballistically through the slab
# forever (~8 A/ps x 225 ps = a bottom-up amorphisation front).  Zero the
# velocities too: F=0 and v=0 makes the layer truly static.
velocity    anchor set 0.0 0.0 0.0
fix         colbath bath langevin ${temperature} ${temperature} 0.1 ${seed_coll} zero yes
fix         coldyn  all nve
# Adaptive dt: max 0.05 A displacement/step, dt in [1e-7, 1e-4] ps.
fix         coldt   all dt/reset 1 1.0e-7 1.0e-4 0.05 units box
# LSS electronic stopping (corrected tables) on every atom above 10 eV;
# minneigh 1 keeps it off the ion during the vacuum flight.
fix         elstop  all electron/stopping 10.0 ${stop_file} minneigh 1

# End the ballistic phase as soon as nothing exceeds 100 eV: the ceiling
# collision_steps is sized so this ALWAYS triggers first in production
# (500k steps x 0.05 A = 25000 A of fast-atom travel budget, ~2.6x the
# 60 keV electronic-only CSDA path).
compute     keat  all ke/atom
compute     maxke all reduce max c_keat
variable    maxke equal c_maxke
fix         ballistic_done all halt 500 v_maxke < 100.0 error continue

dump        collision ion custom 100 ${scratch}/collision-ion.lammpstraj id type x y z vx vy vz
dump_modify collision sort id

timestep    1.0e-4
run         ${collision_steps}

undump      collision
unfix       ballistic_done
variable    maxke delete
uncompute   maxke
uncompute   keat
unfix       elstop
unfix       coldt
unfix       coldyn
unfix       colbath

# ============================================================
# Phase 3: Quench -- 500 ps at target T
#   (True defect annealing in diamond needs seconds at >1100 K -- barriers
#    are ~2.3 eV -- so beyond cascade quench + ion settling, more MD time
#    buys nothing.  dt/reset is insurance against any residual fast atom.)
# ============================================================
fix         annbath bath langevin ${temperature} ${temperature} 0.1 ${seed_anneal} zero yes
fix         anndyn  all nve
fix         anndt   all dt/reset 10 1.0e-6 1.0e-3 0.1 units box

dump        anneal ion custom 1000 ${scratch}/anneal-ion.lammpstraj id type x y z vx vy vz
dump_modify anneal sort id

timestep    0.001
run         ${anneal_steps}

undump      anneal
unfix       anndt
unfix       anndyn
unfix       annbath
unfix       pin

write_data  ${scratch}/final.data
